// COMSOL Multiphysics 6.0.0.405 model "s2.mph"
// Outline of the model tree

Parameters
  w_n = 3[mm]
  w_p = 2[mm]
  height = 5[mm]
  FF = 0.1
  Q_in = 5000[W/m^2]
  pitch = sqrt((w_n^2+w_p^2)/(4*FF))*2
  w_ic = if(w_n>w_p,w_n,w_p)
  h_ic = 1[mm]
  h_t = 0.5[mm]
  T_C = 300[K]
  R0 = 1[ohm]
  A_in = 4*pitch^2
  P_in = 0.1[W]
  rho_c = 3e-3[ohm*m^2]
  R_nTE = height/(50000[S/m]*w_n^2)
  R_pTE = height/(60000[S/m]*w_p^2)
  R_ic = (pitch+w_n/2+w_p/2)/(w_ic*h_ic*5.998e7[S/m])
  R_calc = R_nTE+R_pTE

Probes
  var1: GlobalVariable "PowerOut" | expr = cir.R1_i*cir.R1_v; unit = mW; table = tbl1
  var2: GlobalVariable "Efficiency" | expr = cir.R1_i*cir.R1_v/(Q_in*A_in); unit = 1; table = tbl1
  bnd1: Boundary "AveTh" on boundaries 8 | expr = T; unit = K; descr = Temperature; frame = material; table = tbl1

Geometry
  geom1 "Geometry 1" (3D, length unit mm)
    blk1: Block "n" | pos = {-pitch/2-w_n/2, -w_n/2, 0}; size = {w_n, w_n, height}
    blk2: Block "p" | pos = {pitch/2-w_p/2, -w_p/2, 0}; size = {w_p, w_p, height}
    blk3: Block "Top Interconnect" | pos = {-pitch/2-w_n/2, -w_ic/2, height}; size = {pitch+w_n/2+w_p/2, w_ic, h_ic}
    blk4: Block "bottom IC 1" | pos = {-pitch, -w_ic/2, -h_ic}; size = {(pitch)/2+w_n/2, w_ic, h_ic}
    blk5: Block "bottom IC 1.1" | pos = {pitch/2-w_p/2, -w_ic/2, -h_ic}; size = {(pitch)/2+w_p/2, w_ic, h_ic}
    blk6: Block | pos = {-pitch, -pitch/2, -h_ic-h_t}; size = {pitch*2, pitch, h_t}
    blk7: Block | pos = {-pitch, -pitch/2, height+h_ic}; size = {pitch*2, pitch, h_t}
    fin: Finalize "Form Union"

Materials
  mat1: Common "Copper" on domains 3, 5, 6
    def "Basic"
      relpermeability = 1
      electricconductivity = 5.998e7[S/m]
      thermalexpansioncoefficient = 17e-6[1/K]
      heatcapacity = 385[J/(kg*K)]
      relpermittivity = 1
      density = 8960[kg/m^3]
      thermalconductivity = 400[W/(m*K)]
      seebeckcoefficient = 1E-6
    Enu "Young's modulus and Poisson's ratio"
      E = 110e9[Pa]
      nu = 0.35
    linzRes "Linearized resistivity"
      rho0 = 1.72e-8[ohm*m]
      alpha = 0.0039[1/K]
      Tref = 298[K]
  mat2: Common "Glass (quartz)" on domains 1, 2
    def "Basic"
      relpermeability = 1
      electricconductivity = 1e-14[S/m]
      relpermittivity = 4.2
      density = 2210[kg/m^3]
      thermalconductivity = 1.4[W/(m*K)]
      heatcapacity = 730[J/(kg*K)]
      seebeckcoefficient = 1E-50
    RefractiveIndex
      n = 1.5
      ki = 0
  sw1: Switch "N-type" on domains 4
    mat6: Common "nBiSeTe"
      def "Basic"
        density = 7700[kg/m^3]
        heatcapacity = 154[J/(kg*K)]
        seebeckcoefficient = S(T)
        thermalconductivity = k(T)
        electricconductivity = sigma(T)
        relpermittivity = 1
        int1: Interpolation "Seebeck"
          funcname = S
          table = 
            {300, -0.000182977}
            {305, -0.000184801}
            {310, -0.000186525}
            {315, -0.000188147}
            {320, -0.000189668}
            {325, -0.000191088}
            {330, -0.000192406}
            {335, -0.000193624}
            {340, -0.000194739}
            {345, -0.000195754}
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          interp = cubicspline
          extrap = interior
          fununit = V/K
          argunit = K
        int2: Interpolation "Thermal Conductivity"
          funcname = k
          table = 
            {300, 1.064177289}
            {305, 1.060372096}
            {310, 1.056857685}
            {315, 1.053646311}
            {320, 1.050750231}
            {325, 1.0481817}
            {330, 1.045952972}
            {335, 1.044076305}
            {340, 1.042563953}
            {345, 1.041428171}
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          interp = cubicspline
          extrap = interior
          fununit = W/m/K
          argunit = K
        int3: Interpolation "Electrical Conductivity"
          funcname = sigma
          table = 
            {300, 75552.73313}
            {305, 74030.47354}
            {310, 72587.81327}
            {315, 71219.40493}
            {320, 69920.3375}
            {325, 68686.09462}
            {330, 67512.51745}
            {335, 66395.77147}
            {340, 65332.31688}
            {345, 64318.88199}
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          interp = cubicspline
          extrap = interior
          fununit = S/m
          argunit = K
  sw2: Switch "P-type" on domains 7
    mat3: Common "BiSbTe Nano"
      def "Basic"
        density = 7700[kg/m^3]
        heatcapacity = 154[J/(kg*K)]
        seebeckcoefficient = S(T)
        thermalconductivity = k(T)
        electricconductivity = sigma(T)
        relpermittivity = 1
        int1: Interpolation "Seebeck"
          funcname = S
          table = 
            {300, 0.00018684}
            {305, 0.000189144}
            {310, 0.000191359}
            {315, 0.000193484}
            {320, 0.00019552}
            {325, 0.000197467}
            {330, 0.000199323}
            {335, 0.000201091}
            {340, 0.000202769}
            {345, 0.000204357}
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          interp = cubicspline
          extrap = interior
          fununit = V/K
          argunit = K
        int2: Interpolation "Thermal Conductivity"
          funcname = k
          table = 
            {300, 1.119796426}
            {305, 1.105289277}
            {310, 1.091722484}
            {315, 1.079088142}
            {320, 1.067378343}
            {325, 1.056585177}
            {330, 1.046700739}
            {335, 1.03771712}
            {340, 1.029626412}
            {345, 1.022420707}
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          interp = cubicspline
          extrap = interior
          fununit = W/m/K
          argunit = K
        int3: Interpolation "Electrical Conductivity"
          funcname = sigma
          table = 
            {300, 125565.3005}
            {305, 121850.0788}
            {310, 118310.1091}
            {315, 114934.4943}
            {320, 111713.1732}
            {325, 108636.8448}
            {330, 105696.9001}
            {335, 102885.3614}
            {340, 100194.8274}
            {345, 97618.42354}
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          interp = cubicspline
          extrap = interior
          fununit = S/m
          argunit = K

Physics
  ht: HeatTransfer "Heat Transfer in Solids" on all domains
    dependent variable T
    solid1: SolidHeatTransferModel "Solid 1" (default)
    init1: init "Initial Values 1" (default)
    ins1: ThermalInsulation (default)
    hf2: HeatFluxBoundary "Heat Flux 2" on boundaries 1, 2, 4, 7, 9, 10, 12-14, 16, 17, 19, 20, 23-29, 31-33, 36-40, 42
      HeatFluxType = ConvectiveHeatFlux
      h = 10
    hf1: HeatFluxBoundary "Heat Flux 1" on boundaries 8 | q0 = Q_in
    temp1: TemperatureBoundary "Temperature 1" on boundaries 3 | T0 = T_C
    pc1: PeriodicHeat "Periodic Condition 1" on boundaries 6, 15 | destinationDomains: boundaries 15
    pc2: PeriodicHeat "Periodic Condition 2" on boundaries 5, 41 | destinationDomains: boundaries 41
  ec: ConductiveMedia "Electric Currents" on all domains
    dependent variable V
    cucn1: CurrentConservation (default)
    ein1: ElectricInsulation (default)
    init1: init "Initial Values 1" (default)
    gnd1: Ground on boundaries 9
    term1: Terminal on boundaries 42 | TerminalType = Circuit
    ci1: ContactImpedance on boundaries 18, 21, 34, 35 | spec_type = surfimp; rhos = rho_c
  cir: Circuit "Electrical Circuit"
    dependent variable voltages
    gnd1: GroundNode
    IvsU1: ModelDeviceIV "External I Vs. U 1" | V_src = root.comp1.ec.V0_1; Connections = {1, 0}
    R1: Resistor "Resistor R1" | R = R0; Connections = {1, 0}

Multiphysics
  tee1: ThermoelectricEffect on all domains | Heat_physics = ht; EMCurrentDensity_physics = ec
  emh1: ElectromagneticHeating on all domains | EMHeat_physics = ec; Heat_physics = ht

Mesh
  mesh1 "Mesh 1" (physics-controlled)
    size: MeshSizeDefault | hauto = 4

Studies
  std1 "Study 1"
    param: Parametric "Parametric Sweep" | pname = R0; plistarr = R_calc*10^{range(log10(0.01),1/2,log10(100))}; punit = Ω
    stat: Stationary

Tables
  tbl1: Table "Probe Table 1"
    R0 (Ω) | cir.R1_i*cir.R1_v (mW) | cir.R1_i*cir.R1_v/(Q_in*A_in) (1) | Temperature (K), AveTh
    0.000319444 | 4.33856e-10 | 1.66868e-13 | 538.173
    0.00101017 | 1.37187e-09 | 5.27643e-13 | 538.173
    0.00319444 | 4.33855e-09 | 1.66867e-12 | 538.173
    0.0101017 | 1.37196e-08 | 5.27678e-12 | 538.173
    0.0319444 | 4.33844e-08 | 1.66863e-11 | 538.173
    0.101017 | 1.37185e-07 | 5.27633e-11 | 538.173
    0.319444 | 4.33166e-07 | 1.66602e-10 | 538.158
    1.01017 | 1.37016e-06 | 5.26983e-10 | 538.173
    3.19444 | 4.3258e-06 | 1.66377e-09 | 538.179

Plots
  pg1: PlotGroup1D "Probe Plot Group 1"
    tblp1: Table "Probe Table Graph 1" | table = tbl1; plotcolumns = {2, 3, 4}